<?xml version="1.0"?>
<?xml-stylesheet type="text/xsl" href="http://jsbsim.sourceforge.net/JSBSim.xsl"?>
<fdm_config name="Lunar Module" version="2.0" release="BETA">

    <fileheader>
        <author> Author Name </author>
        <filecreationdate> Creation Date </filecreationdate>
        <description> Description </description>
        <version> Version </version>
        <reference refID="None" author="n/a" title="n/a" date="n/a"/>
    </fileheader>

    <metrics>
        <wingarea unit="FT2"> 0 </wingarea>
        <wingspan unit="FT"> 0 </wingspan>
        <chord unit="FT"> 0 </chord>
        <htailarea unit="FT2"> 0 </htailarea>
        <htailarm unit="FT"> 0 </htailarm>
        <vtailarea unit="FT2"> 0 </vtailarea>
        <vtailarm unit="FT"> 0 </vtailarm>
        <location name="AERORP" unit="IN">
            <x> 0 </x>
            <y> 0 </y>
            <z> 0 </z>
        </location>
        <location name="EYEPOINT" unit="IN">
            <x> -58 </x>
            <y> -21 </y>
            <z> 104.9 </z>
        </location>
        <location name="VRP" unit="IN">
            <x> 0 </x>
            <y> 0 </y>
            <z> 0 </z>
        </location>
    </metrics>

    <mass_balance>
        <ixx unit="SLUG*FT2"> 12750 </ixx>
        <iyy unit="SLUG*FT2"> 13629 </iyy>
        <izz unit="SLUG*FT2"> 16099 </izz>
        <ixz unit="SLUG*FT2"> -231 </ixz>
        <iyz unit="SLUG*FT2"> -0 </iyz>
        <ixy unit="SLUG*FT2"> -652 </ixy>
        <emptywt unit="LBS"> 16370 </emptywt>
        <location name="CG" unit="IN">
            <x> 0 </x>
            <y> 0 </y>
            <z> 0 </z>
        </location>
    </mass_balance>

    <ground_reactions>
        <contact type="BOGEY" name="LADDER">
            <location unit="IN">
                <x> -163 </x>
                <y> 0 </y>
                <z> -105 </z>
            </location>
            <static_friction> 0.9 </static_friction>
            <dynamic_friction> 0.2 </dynamic_friction>
            <rolling_friction> 0.2 </rolling_friction>
            <spring_coeff unit="LBS/FT"> 15000 </spring_coeff>
            <damping_coeff unit="LBS/FT/SEC"> 1000 </damping_coeff>
            <max_steer unit="DEG"> 0.0 </max_steer>
            <brake_group> NONE </brake_group>
            <retractable>0</retractable>
        </contact>
        <contact type="BOGEY" name="LEFT">
            <location unit="IN">
                <x> 0 </x>
                <y> -163 </y>
                <z> -105 </z>
            </location>
            <static_friction> 0.9 </static_friction>
            <dynamic_friction> 0.2 </dynamic_friction>
            <rolling_friction> 0.2 </rolling_friction>
            <spring_coeff unit="LBS/FT"> 15000 </spring_coeff>
            <damping_coeff unit="LBS/FT/SEC"> 1000 </damping_coeff>
            <max_steer unit="DEG"> 0.0 </max_steer>
            <brake_group> NONE </brake_group>
            <retractable>0</retractable>
        </contact>
        <contact type="BOGEY" name="RIGHT">
            <location unit="IN">
                <x> 0 </x>
                <y> -163 </y>
                <z> -105 </z>
            </location>
            <static_friction> 0.9 </static_friction>
            <dynamic_friction> 0.2 </dynamic_friction>
            <rolling_friction> 0.2 </rolling_friction>
            <spring_coeff unit="LBS/FT"> 15000 </spring_coeff>
            <damping_coeff unit="LBS/FT/SEC"> 1000 </damping_coeff>
            <max_steer unit="DEG"> 0.0 </max_steer>
            <brake_group> NONE </brake_group>
            <retractable>0</retractable>
        </contact>
        <contact type="BOGEY" name="REAR">
            <location unit="IN">
                <x> 163 </x>
                <y> 0 </y>
                <z> -105 </z>
            </location>
            <static_friction> 0.9 </static_friction>
            <dynamic_friction> 0.2 </dynamic_friction>
            <rolling_friction> 0.2 </rolling_friction>
            <spring_coeff unit="LBS/FT"> 15000 </spring_coeff>
            <damping_coeff unit="LBS/FT/SEC"> 1000 </damping_coeff>
            <max_steer unit="DEG"> 0.0 </max_steer>
            <brake_group> NONE </brake_group>
            <retractable>0</retractable>
        </contact>
    </ground_reactions>
    <propulsion>
        <engine file="LMdescent">
            <location unit="IN">
                <x> 600 </x>
                <y> 0 </y>
                <z> 0 </z>
            </location>
            <orient unit="DEG">
                <roll> 0.0 </roll>
                <pitch> 0 </pitch>
                <yaw> 0 </yaw>
            </orient>
            <feed>0</feed>
            <feed>1</feed>
            <thruster file="LM_descent_nozzle">
                <location unit="IN">
                    <x> 600 </x>
                    <y> 0 </y>
                    <z> 0 </z>
                </location>
                <orient unit="DEG">
                    <roll> 0.0 </roll>
                    <pitch> 0.0 </pitch>
                    <yaw> 0.0 </yaw>
                </orient>
            </thruster>
        </engine>
        <tank type="OXIDIZER">    <!-- Tank number 0 -->
            <location unit="IN">
                <x> 282.3 </x>
                <y> 0 </y>
                <z> 0 </z>
            </location>
            <capacity unit="LBS"> 9470 </capacity>
            <contents unit="LBS"> 9470 </contents>
        </tank>
        <tank type="FUEL">    <!-- Tank number 1 -->
            <location unit="IN">
                <x> 408.3 </x>
                <y> 0 </y>
                <z> 0 </z>
            </location>
            <capacity unit="LBS"> 8236 </capacity>
            <contents unit="LBS"> 8236 </contents>
        </tank>
    </propulsion>
    <flight_control name="FCS: X-15 SAS">

        <component name="Pitch Trim Sum" type="SUMMER">
            <input>fcs/elevator-cmd-norm</input>
            <input>fcs/pitch-trim-cmd-norm</input>
            <clip>
                <min>-1</min>
                <max>1</max>
            </clip>
        </component>

        <component name="Pitch Command Scale" type="AEROSURFACE_SCALE">
            <input>fcs/pitch-trim-sum</input>
            <range>
                <min>-50</min>
                <max>50</max>
            </range>
        </component>

        <component name="Pitch Gain 1" type="PURE_GAIN">
            <input>fcs/pitch-command-scale</input>
            <gain>-0.36</gain>
        </component>

        <component name="Pitch Scheduled Gain 1" type="SCHEDULED_GAIN">
            <input>fcs/pitch-gain-1</input>
            <gain>0.017</gain>
        </component>

        <component name="Roll Command Scale" type="AEROSURFACE_SCALE">
            <input>fcs/aileron-cmd-norm</input>
            <range>
                <min>-20</min>
                <max>20</max>
            </range>
        </component>

        <component name="Roll Gain 1" type="PURE_GAIN">
            <input>fcs/roll-command-scale</input>
            <gain>0.42</gain>
        </component>

        <component name="Roll Gain 2" type="PURE_GAIN">
            <input>fcs/roll-gain-1</input>
            <gain>0.027</gain>
        </component>

        <component name="Yaw Command Scale" type="AEROSURFACE_SCALE">
            <input>fcs/rudder-cmd-norm</input>
            <range>
                <min>-250</min>
                <max>250</max>
            </range>
        </component>

        <component name="Yaw Gain 1" type="PURE_GAIN">
            <input>fcs/yaw-command-scale</input>
            <gain>0.082</gain>
        </component>

        <component name="Yaw Gain 2" type="PURE_GAIN">
            <input>fcs/yaw-gain-1</input>
            <gain>0.04</gain>
        </component>

        <component name="Pitch SAS Feedback" type="PURE_GAIN">
            <input>velocities/q-rad_sec</input>
            <gain>0.75</gain>
        </component>

        <component name="Yaw-Roll Crossover Gain" type="PURE_GAIN">
            <input>velocities/r-rad_sec</input>
            <gain>-0.9</gain>
        </component>

        <component name="Yaw Coupled Aileron Feedback Sum" type="SUMMER">
            <input>velocities/p-rad_sec</input>
            <input>fcs/yaw-roll-crossover-gain</input>
        </component>

        <component name="Roll SAS Gain" type="PURE_GAIN">
            <input>fcs/yaw-coupled-aileron-feedback-sum</input>
            <gain>-0.5</gain>
        </component>

        <component name="Yaw SAS Gain" type="PURE_GAIN">
            <input>velocities/r-rad_sec</input>
            <gain>0.3</gain>
        </component>

        <component name="Elevator Positioning" type="SUMMER">
            <input>fcs/pitch-scheduled-gain-1</input>
            <input>fcs/pitch-sas-feedback</input>
            <clip>
                <min>-0.26</min>
                <max>0.61</max>
            </clip>
        </component>

        <component name="Elevator Filter" type="LAG_FILTER">
            <input>fcs/elevator-positioning</input>
            <c1>600</c1>
            <output>fcs/elevator-pos-rad</output>
        </component>

        <component name="Aileron Positioning" type="SUMMER">
            <input>fcs/roll-gain-2</input>
            <input>fcs/roll-sas-gain</input>
            <clip>
                <min>-0.35</min>
                <max>0.35</max>
            </clip>
            <output>fcs/left-aileron-pos-rad</output>
        </component>

        <component name="Rudder Positioning" type="SUMMER">
            <input>fcs/yaw-gain-2</input>
            <input>fcs/yaw-sas-gain</input>
            <clip>
                <min>-0.52</min>
                <max>0.52</max>
            </clip>
            <output>fcs/rudder-pos-rad</output>
        </component>
    </flight_control>
    <aerodynamics>
    </aerodynamics>
</fdm_config>
