<FDM_CONFIG NAME="T37" VERSION="1.61" RELEASE="ALPHA">
<!--
  File:     T37.xml
  Author:   Aero-Matic v 0.7

  Inputs:
    name:          T37
    type:          two-engine transonic/supersonic fighter
    max weight:    6580 lb
    wing span:     33.833 ft
    length:        29.333 ft
    wing area:     158.86 sq-ft
    gear type:     tricycle
    retractable?:  yes
    # engines:     2
    engine type:   turbine
    engine layout: aft fuselage
    yaw damper?    no
  Outputs:
    wing loading:  41.42 lb/sq-ft
    CL-alpha:      3.6 per radian
    CL-0:          0.08
    CL-max:        1
    CD-0:          0.024
    K:             0.09

    Sources:

      * http://www.wpafb.af.mil/museum/newold/t37.htm
      SPECIFICATIONS
        Span:   10.32 meters (33 ft. 10 in.)
        Length:  8.92 meters (29 ft.  4 in.)
        Height:  2.79 meters ( 9 ft.  5 in.)
        Weight: 4,056 lbs. empty
                6,580 lbs. max.
        Armament: None
        Engines: Two Continental J69-T-25s of 1,025 lbs. thrust ea.
        Crew: Two

      PERFORMANCE
        Maximum speed:   425 mph (370 Kt)
        Cruising speed:  350 mph.
        Range:           650 miles
        Service Ceiling: 35,000 ft.

    * Jeff Scott
      Cessna A-37/T-37, cruise configuration
      small twin jet engine military trainer, data from:
        Roskam, Jan. Airplane Flight Dynamics and Automatic Flight
        Controls, Part I. Lawrence KS: DARcorporation, 1995,
        pg 501-503

    * H-886: A flight test investigation of the rolling moments induced
             on a T-37B airplane in the wake of a B-747 airplane.
    * H-912: Stability and control derivatives of the T-37 airplane.

-->

 <METRICS>
   AC_WINGAREA  182.0		<!-- Roskam -->
   AC_WINGSPAN  33.83		<!-- Roskam -->
   AC_CHORD      5.47		<!-- Roskam -->
   AC_HTAILAREA 31.77
   AC_HTAILARM  11.73
   AC_VTAILAREA 28.59
   AC_LV        11.73
   AC_IXX       3010		<!-- Roskam defines 7985 -->
   AC_IYY       3847		<!-- Culp defined 6000, Roskam defines 3326 -->
   AC_IZZ       6392		<!-- Roskam defines 11183 -->
   AC_IXZ       0		<!-- Roskam -->
   AC_EMPTYWT   4337		<!-- Roskam defines 6360 -->
   AC_CGLOC     211.2  0.0 -8.8
   AC_AERORP    211.2  0.0  0.0
   AC_EYEPTLOC  70.4  0.0 38.0
   AC_VRP       211.2  0.0 -8.8
 </METRICS>
 <UNDERCARRIAGE>
  AC_GEAR NOSE_LG   45.8  0.0 -42.2 1974.0 658.0  0.5  0.8  0.02 STEERABLE NONE  5.0 RETRACT
  AC_GEAR LEFT_MLG  221.8 -36.5 -42.2 6580.0 1316.0  0.5  0.8  0.02 FIXED LEFT  0 RETRACT
  AC_GEAR RIGHT_MLG 221.8 36.5 -42.2 6580.0 1316.0  0.5  0.8  0.02 FIXED RIGHT 0 RETRACT
 </UNDERCARRIAGE>
 <PROPULSION>
  <AC_ENGINE FILE="J69-T25_sim">
    XLOC 291.996
    YLOC -20
    ZLOC 0
    PITCH 0
    YAW 0
    FEED 0
  </AC_ENGINE>
  <AC_THRUSTER FILE="direct">
    XLOC 291.996
    YLOC -20
    ZLOC 0
    PITCH 0
    YAW 0
  </AC_THRUSTER>
  <AC_ENGINE FILE="J69-T25_sim">
    XLOC 291.996
    YLOC 20
    ZLOC 0
    PITCH 0
    YAW 0
    FEED 1
  </AC_ENGINE>
  <AC_THRUSTER FILE="direct">
    XLOC 291.996
    YLOC 20
    ZLOC 0
    PITCH 0
    YAW 0
  </AC_THRUSTER>
  <AC_TANK TYPE="FUEL" NUMBER="0">
    XLOC 211.1976
    YLOC 0
    ZLOC -8.7999
    RADIUS 1
    CAPACITY   700.0
    CONTENTS   350.0
  </AC_TANK>
  <AC_TANK TYPE="FUEL" NUMBER="1">
    XLOC 211.1976
    YLOC 0
    ZLOC -8.7999
    RADIUS 1
    CAPACITY   700.0
    CONTENTS   350.0
  </AC_TANK>
 </PROPULSION>
 <FLIGHT_CONTROL NAME="T37">
   <COMPONENT NAME="Pitch Trim Sum" TYPE="SUMMER">
      INPUT   fcs/elevator-cmd-norm
      INPUT   fcs/pitch-trim-cmd-norm
      CLIPTO  -1 1
   </COMPONENT>
   <COMPONENT NAME="Elevator Control" TYPE="AEROSURFACE_SCALE">
      INPUT   fcs/pitch-trim-sum
      MIN     -0.454
      MAX      0.262
      OUTPUT  fcs/elevator-pos-rad
   </COMPONENT>
   <COMPONENT NAME="Roll Trim Sum" TYPE="SUMMER">
      INPUT   fcs/aileron-cmd-norm
      INPUT   fcs/roll-trim-cmd-norm
      CLIPTO  -1 1
   </COMPONENT>
   <COMPONENT NAME="Left Aileron Control" TYPE="AEROSURFACE_SCALE">
      INPUT   fcs/roll-trim-sum
      MIN    -0.262
      MAX     0.262
      OUTPUT  fcs/left-aileron-pos-rad
   </COMPONENT>
   <COMPONENT NAME="Right Aileron Control" TYPE="AEROSURFACE_SCALE">
      INPUT  -fcs/roll-trim-sum
      MIN    -0.262
      MAX     0.262
      OUTPUT  fcs/right-aileron-pos-rad
   </COMPONENT>
   <COMPONENT NAME="Yaw Trim Sum" TYPE="SUMMER">
      INPUT   fcs/rudder-cmd-norm
      INPUT   fcs/yaw-trim-cmd-norm
      CLIPTO  -1 1
   </COMPONENT>
   <COMPONENT NAME="Rudder Control" TYPE="AEROSURFACE_SCALE">
      INPUT   fcs/yaw-trim-sum
      MIN     -0.436
      MAX      0.436
      OUTPUT  fcs/rudder-pos-rad
   </COMPONENT>
   <COMPONENT NAME="Flaps Control" TYPE="KINEMAT">
     INPUT   fcs/flap-cmd-norm
     DETENTS 3
             0   0
             20  4
             40  3
     OUTPUT  fcs/flap-pos-deg
   </COMPONENT>
   <COMPONENT NAME="Gear Control" TYPE="KINEMAT">
     INPUT   gear/gear-cmd-norm
     DETENTS 2
             0   0
             1   5
     OUTPUT  gear/gear-pos-norm
   </COMPONENT>
   <COMPONENT NAME="Speedbrake Control" TYPE="KINEMAT">
     INPUT   fcs/speedbrake-cmd-norm
     DETENTS 2
             0     0
             1.153 1
     OUTPUT  fcs/speedbrake-pos-rad
   </COMPONENT>
 </FLIGHT_CONTROL>
 <AERODYNAMICS>
 </AERODYNAMICS>
 <OUTPUT NAME="JSBoutT37.csv" TYPE="CSV">
   RATE_IN_HZ       20
   SIMULATION       OFF
   ATMOSPHERE       ON
   MASSPROPS        ON
   AEROSURFACES     ON
   RATES            ON
   VELOCITIES       ON
   FORCES           ON
   MOMENTS          ON
   POSITION         ON
   COEFFICIENTS     ON
   GROUND_REACTIONS ON
   FCS              ON
   PROPULSION       ON
 </OUTPUT>
</FDM_CONFIG>
