<FDM_CONFIG NAME="BALL" VERSION="1.61" RELEASE= "ALPHA" >

  <METRICS>

    AC_WINGAREA 1.0
    AC_IXX      10.0
    AC_IYY      10.0
    AC_IZZ      10.0
    AC_IXZ      0.0
    AC_EMPTYWT  50.0
    AC_CGLOC    0.0 0.0 0.0

  </METRICS>

  <UNDERCARRIAGE>

   AC_GEAR  NOSE_CONTACT    0.0  0.0  0.0  10000 200000  0.0  0.0  0.0  FIXED NONE 0 FIXED

  </UNDERCARRIAGE>

  <AERODYNAMICS>
    <AXIS NAME="DRAG">
      <COEFFICIENT NAME="CD" TYPE="VALUE">
         Drag
         aero/qbar-psf | metrics/Sw-sqft
         1.0
      </COEFFICIENT>
    </AXIS>
  </AERODYNAMICS>

  <OUTPUT NAME="JSBout.csv" TYPE="CSV">
    RATE_IN_HZ       20
    SIMULATION       ON
    ATMOSPHERE       OFF
    MASSPROPS        OFF
    AEROSURFACES     ON
    RATES            ON
    VELOCITIES       ON
    FORCES           ON
    MOMENTS          ON
    POSITION         ON
    COEFFICIENTS     OFF
    GROUND_REACTIONS ON
    FCS              ON
    PROPULSION       ON
  </OUTPUT>

</FDM_CONFIG>
